// SBML level 3 version 1

model main()
  // model units - substance: mole, time: second, volume: litre, area: square_metre, length: metre, extent: mole

  // Compartments:
  compartment default = 1e-6;

  // Species:
  species rna_dCas9 in default;
  species complex_rna_dCas9_protein_RNAase in default; complex_rna_dCas9_protein_RNAase is "complex_rna_dCas9:protein_RNAase";
  species complex_rna_dCas9_protein_Ribo in default; complex_rna_dCas9_protein_Ribo is "complex_rna_dCas9:protein_Ribo";
  species complex_dna_dCas9_protein_RNAP in default; complex_dna_dCas9_protein_RNAP is "complex_dna_dCas9:protein_RNAP";
  species dna_dCas9 in default;
  species protein_dCas9 in default;
  species complex_dna_gRNA_protein_RNAP in default; complex_dna_gRNA_protein_RNAP is "complex_dna_gRNA:protein_RNAP";
  species rna_guide1 in default;
  species complex_rna_guide1_protein_RNAase in default; complex_rna_guide1_protein_RNAase is "complex_rna_guide1:protein_RNAase";
  species dna_gRNA in default;
  species complex_rna_guide1_protein_dCas9 in default; complex_rna_guide1_protein_dCas9 is "complex_rna_guide1:protein_dCas9";
  species protein_reporter in default;
  species complex_complex_complex_rna_guide1_protein_dCas9_dna_reporter_protein_RNAP in default; complex_complex_complex_rna_guide1_protein_dCas9_dna_reporter_protein_RNAP is "complex_complex_complex_rna_guide1:protein_dCas9:dna_reporter:protein_RNAP";
  species dna_reporter in default;
  species complex_rna_reporter_protein_Ribo in default; complex_rna_reporter_protein_Ribo is "complex_rna_reporter:protein_Ribo";
  species complex_complex_rna_guide1_protein_dCas9_dna_reporter in default; complex_complex_rna_guide1_protein_dCas9_dna_reporter is "complex_complex_rna_guide1:protein_dCas9:dna_reporter";
  species complex_rna_reporter_protein_RNAase in default; complex_rna_reporter_protein_RNAase is "complex_rna_reporter:protein_RNAase";
  species rna_reporter in default;
  species complex_dna_reporter_protein_RNAP in default; complex_dna_reporter_protein_RNAP is "complex_dna_reporter:protein_RNAP";
  species protein_RNAP in default;
  species protein_Ribo in default;
  species protein_RNAase in default;

  // Reactions:
  r0: dna_dCas9 + protein_RNAP => complex_dna_dCas9_protein_RNAP; r0_k*dna_dCas9*protein_RNAP;
    r0_k = 100;
  r0_1: complex_dna_dCas9_protein_RNAP => dna_dCas9 + protein_RNAP; r0_1_k*complex_dna_dCas9_protein_RNAP;
    r0_1_k = 10;
  r1: complex_dna_dCas9_protein_RNAP => dna_dCas9 + rna_dCas9 + protein_RNAP; r1_k*complex_dna_dCas9_protein_RNAP;
    r1_k = 3;
  r2: rna_dCas9 + protein_Ribo => complex_rna_dCas9_protein_Ribo; r2_k*rna_dCas9*protein_Ribo;
    r2_k = 100;
  r2_1: complex_rna_dCas9_protein_Ribo => rna_dCas9 + protein_Ribo; r2_1_k*complex_rna_dCas9_protein_Ribo;
    r2_1_k = 10;
  r3: complex_rna_dCas9_protein_Ribo => rna_dCas9 + protein_dCas9 + protein_Ribo; r3_k*complex_rna_dCas9_protein_Ribo;
    r3_k = 2;
  r4: rna_dCas9 + protein_RNAase => complex_rna_dCas9_protein_RNAase; r4_k*rna_dCas9*protein_RNAase;
    r4_k = 100;
  r4_1: complex_rna_dCas9_protein_RNAase => rna_dCas9 + protein_RNAase; r4_1_k*complex_rna_dCas9_protein_RNAase;
    r4_1_k = 10;
  r5: complex_rna_dCas9_protein_RNAase => protein_RNAase; r5_k*complex_rna_dCas9_protein_RNAase;
    r5_k = 1;
  r6: dna_gRNA + protein_RNAP => complex_dna_gRNA_protein_RNAP; r6_k*dna_gRNA*protein_RNAP;
    r6_k = 100;
  r6_1: complex_dna_gRNA_protein_RNAP => dna_gRNA + protein_RNAP; r6_1_k*complex_dna_gRNA_protein_RNAP;
    r6_1_k = 10;
  r7: complex_dna_gRNA_protein_RNAP => dna_gRNA + rna_guide1 + protein_RNAP; r7_k*complex_dna_gRNA_protein_RNAP;
    r7_k = 3;
  r8: rna_guide1 + protein_RNAase => complex_rna_guide1_protein_RNAase; r8_k*rna_guide1*protein_RNAase;
    r8_k = 100;
  r8_1: complex_rna_guide1_protein_RNAase => rna_guide1 + protein_RNAase; r8_1_k*complex_rna_guide1_protein_RNAase;
    r8_1_k = 10;
  r9: complex_rna_guide1_protein_RNAase => protein_RNAase; r9_k*complex_rna_guide1_protein_RNAase;
    r9_k = 1;
  r10: rna_guide1 + protein_dCas9 => complex_rna_guide1_protein_dCas9; r10_k*rna_guide1*protein_dCas9;
    r10_k = 100;
  r10_1: complex_rna_guide1_protein_dCas9 => rna_guide1 + protein_dCas9; r10_1_k*complex_rna_guide1_protein_dCas9;
    r10_1_k = 0.01;
  r11: dna_reporter + protein_RNAP => complex_dna_reporter_protein_RNAP; r11_k*dna_reporter*protein_RNAP;
    r11_k = 100;
  r11_1: complex_dna_reporter_protein_RNAP => dna_reporter + protein_RNAP; r11_1_k*complex_dna_reporter_protein_RNAP;
    r11_1_k = 10;
  r12: complex_dna_reporter_protein_RNAP => dna_reporter + rna_reporter + protein_RNAP; r12_k*complex_dna_reporter_protein_RNAP;
    r12_k = 3;
  r13: complex_rna_guide1_protein_dCas9 + dna_reporter => complex_complex_rna_guide1_protein_dCas9_dna_reporter; r13_k*complex_rna_guide1_protein_dCas9*dna_reporter;
    r13_k = 100;
  r13_1: complex_complex_rna_guide1_protein_dCas9_dna_reporter => complex_rna_guide1_protein_dCas9 + dna_reporter; r13_1_k*complex_complex_rna_guide1_protein_dCas9_dna_reporter;
    r13_1_k = 10;
  r14: complex_complex_rna_guide1_protein_dCas9_dna_reporter + protein_RNAP => complex_complex_complex_rna_guide1_protein_dCas9_dna_reporter_protein_RNAP; r14_k*complex_complex_rna_guide1_protein_dCas9_dna_reporter*protein_RNAP;
    r14_k = 100;
  r14_1: complex_complex_complex_rna_guide1_protein_dCas9_dna_reporter_protein_RNAP => complex_complex_rna_guide1_protein_dCas9_dna_reporter + protein_RNAP; r14_1_k*complex_complex_complex_rna_guide1_protein_dCas9_dna_reporter_protein_RNAP;
    r14_1_k = 10000;
  r15: complex_complex_complex_rna_guide1_protein_dCas9_dna_reporter_protein_RNAP => complex_complex_rna_guide1_protein_dCas9_dna_reporter + rna_reporter + protein_RNAP; r15_k*complex_complex_complex_rna_guide1_protein_dCas9_dna_reporter_protein_RNAP;
    r15_k = 0.1;
  r16: rna_reporter + protein_Ribo => complex_rna_reporter_protein_Ribo; r16_k*rna_reporter*protein_Ribo;
    r16_k = 100;
  r16_1: complex_rna_reporter_protein_Ribo => rna_reporter + protein_Ribo; r16_1_k*complex_rna_reporter_protein_Ribo;
    r16_1_k = 10;
  r17: complex_rna_reporter_protein_Ribo => rna_reporter + protein_reporter + protein_Ribo; r17_k*complex_rna_reporter_protein_Ribo;
    r17_k = 2;
  r18: rna_reporter + protein_RNAase => complex_rna_reporter_protein_RNAase; r18_k*rna_reporter*protein_RNAase;
    r18_k = 100;
  r18_1: complex_rna_reporter_protein_RNAase => rna_reporter + protein_RNAase; r18_1_k*complex_rna_reporter_protein_RNAase;
    r18_1_k = 10;
  r19: complex_rna_reporter_protein_RNAase => protein_RNAase; r19_k*complex_rna_reporter_protein_RNAase;
    r19_k = 1;

  // Unit definitions:
  unit square_metre = metre^2;
end
