// SBML level 3 version 1

model main()
  // model units - substance: mole, time: second, volume: litre, area: square_metre, length: metre, extent: mole

  // Compartments:
  compartment default = 1e-6;

  // Species:
  species protein_RNAP in default;
  species protein_Ribo in default;
  species protein_RNAase in default;
  species complex_dna_G1_protein_RNAP in default; complex_dna_G1_protein_RNAP is "complex_dna_G1:protein_RNAP";
  species complex_rna_T1_protein_Ribo in default; complex_rna_T1_protein_Ribo is "complex_rna_T1:protein_Ribo";
  species protein_Reporter in default;
  species rna_T1 in default;
  species complex_rna_T1_protein_RNAase in default; complex_rna_T1_protein_RNAase is "complex_rna_T1:protein_RNAase";
  species dna_G1 in default;

  // Reactions:
  r0: dna_G1 + protein_RNAP => complex_dna_G1_protein_RNAP; r0_k*dna_G1*protein_RNAP;
    r0_k = 100;
  r0_1: complex_dna_G1_protein_RNAP => dna_G1 + protein_RNAP; r0_1_k*complex_dna_G1_protein_RNAP;
    r0_1_k = 10;
  r1: complex_dna_G1_protein_RNAP => dna_G1 + rna_T1 + protein_RNAP; r1_k*complex_dna_G1_protein_RNAP;
    r1_k = 3;
  r2: rna_T1 + protein_Ribo => complex_rna_T1_protein_Ribo; r2_k*rna_T1*protein_Ribo;
    r2_k = 100;
  r2_1: complex_rna_T1_protein_Ribo => rna_T1 + protein_Ribo; r2_1_k*complex_rna_T1_protein_Ribo;
    r2_1_k = 10;
  r3: complex_rna_T1_protein_Ribo => rna_T1 + protein_Reporter + protein_Ribo; r3_k*complex_rna_T1_protein_Ribo;
    r3_k = 2;
  r4: rna_T1 + protein_RNAase => complex_rna_T1_protein_RNAase; r4_k*rna_T1*protein_RNAase;
    r4_k = 100;
  r4_1: complex_rna_T1_protein_RNAase => rna_T1 + protein_RNAase; r4_1_k*complex_rna_T1_protein_RNAase;
    r4_1_k = 10;
  r5: complex_rna_T1_protein_RNAase => protein_RNAase; r5_k*complex_rna_T1_protein_RNAase;
    r5_k = 1;

  // Unit definitions:
  unit square_metre = metre^2;
end
