// SBML level 3 version 1

model main()
  // model units - substance: mole, time: second, volume: litre, area: square_metre, length: metre, extent: mole

  // Compartments:
  compartment default = 1e-6;

  // Species:
  species DNA_G in default;
  species protein_R in default;
  species dimer_R in default;
  species protein_R_deg in default;

  // Reactions:
  r0: DNA_G => DNA_G + protein_R; r0_k*DNA_G;
    r0_k = 1;
  r1: protein_R => dimer_R; r1_k*protein_R^2;
    r1_k = 100;
  r1_1: 2 dimer_R => protein_R; r1_1_k*dimer_R;
    r1_1_k = 10;
  r2: 2 dimer_R => protein_R_deg; r2_k*dimer_R;
    r2_k = 100;
  r2_1: protein_R_deg => dimer_R; r2_1_k*protein_R_deg^2;
    r2_1_k = 10;
  r3: protein_R_deg => ; r3_k*protein_R_deg;
    r3_k = 0.1;

  // Unit definitions:
  unit square_metre = metre^2;
end
