// SBML level 3 version 1

model main()
  // model units - substance: mole, time: second, volume: litre, area: square_metre, length: metre, extent: mole

  // Compartments:
  compartment default = 1e-6;

  // Species:
  species protein_RNAP in default;
  species Ribo in default;
  species protein_RNAase in default;
  species rna_T1 in default;
  species protein_Reporter in default;
  species dna_G1 in default;
  species rna_T1_protein_RNAase in default; rna_T1_protein_RNAase is "rna_T1:protein_RNAase";
  species rna_T1_complex_Ribo in default; rna_T1_complex_Ribo is "rna_T1:complex_Ribo";
  species dna_G1_protein_RNAP in default; dna_G1_protein_RNAP is "dna_G1:protein_RNAP";

  // Reactions:
  r0: dna_G1 + protein_RNAP => dna_G1_protein_RNAP; r0_k*dna_G1*protein_RNAP;
    r0_k = 100;
  r0: dna_G1_protein_RNAP => dna_G1 + protein_RNAP; r0_k*dna_G1_protein_RNAP;
    r0_k = 10;
  r1: dna_G1_protein_RNAP => rna_T1 + dna_G1 + protein_RNAP; r1_k*dna_G1_protein_RNAP;
    r1_k = 3;
  r2: rna_T1 + Ribo => rna_T1_complex_Ribo; r2_k*rna_T1*Ribo;
    r2_k = 100;
  r2: rna_T1_complex_Ribo => rna_T1 + Ribo; r2_k*rna_T1_complex_Ribo;
    r2_k = 10;
  r3: rna_T1_complex_Ribo => rna_T1 + protein_Reporter + Ribo; r3_k*rna_T1_complex_Ribo;
    r3_k = 2;
  r4: rna_T1 + protein_RNAase => rna_T1_protein_RNAase; r4_k*rna_T1*protein_RNAase;
    r4_k = 100;
  r4: rna_T1_protein_RNAase => rna_T1 + protein_RNAase; r4_k*rna_T1_protein_RNAase;
    r4_k = 10;
  r5: rna_T1_protein_RNAase => protein_RNAase; r5_k*rna_T1_protein_RNAase;
    r5_k = 1;

  // Unit definitions:
  unit square_metre = metre^2;
end
