// SBML level 2 version 4

model mix_of_E30VNPRL_E30VNPRL_gene_expression()
  // mix_of_E30VNPRL_E30VNPRL_gene_expression

  // Compartments:
  compartment contents = 1;

  // Species:
  species RNAP in contents = 100.0001/contents;
  species Ribo in contents = 30.00002/contents;
  species RecBCD in contents = 5.000003/contents;
  species RNase in contents = 100.0001/contents;
  species AGTP in contents = 3180048/contents;
  species CUTP in contents = 1908029/contents;
  species AA in contents = 3.180048e7/contents;
  species protein_lacI in contents = 0;
  species IPTG in contents = 0;
  species protein_lacIdimer in contents = 0;
  species protein_lacItetramer in contents = 0;
  species RNA_utr1_lacI in contents = 0; RNA_utr1_lacI is "RNA utr1--lacI";
  species Ribo_RNA_utr1_lacI in contents = 0; Ribo_RNA_utr1_lacI is "Ribo:RNA utr1--lacI";
  species DNA_pOR1OR2_utr1_lacI in contents = 20.00001/contents; DNA_pOR1OR2_utr1_lacI is "DNA pOR1OR2--utr1--lacI";
  species RNAP_DNA_pOR1OR2_utr1_lacI in contents = 0; RNAP_DNA_pOR1OR2_utr1_lacI is "RNAP:DNA pOR1OR2--utr1--lacI";
  species CUTP_AGTP_RNAP_DNA_pOR1OR2_utr1_lacI in contents = 0; CUTP_AGTP_RNAP_DNA_pOR1OR2_utr1_lacI is "CUTP:AGTP:RNAP:DNA pOR1OR2--utr1--lacI";
  species term_RNAP_DNA_pOR1OR2_utr1_lacI in contents = 0; term_RNAP_DNA_pOR1OR2_utr1_lacI is "term_RNAP:DNA pOR1OR2--utr1--lacI";
  species AA_2AGTP_Ribo_RNA_utr1_lacI in contents = 0; AA_2AGTP_Ribo_RNA_utr1_lacI is "AA:2AGTP:Ribo:RNA utr1--lacI";
  species term_Ribo_RNA_utr1_lacI in contents = 0; term_Ribo_RNA_utr1_lacI is "term_Ribo:RNA utr1--lacI";
  species protein_deGFP_contents_21 in contents = 0;
  species protein_deGFP_contents_22 in contents = 0; protein_deGFP_contents_22 is "protein deGFP*";
  species RNA_utr1_deGFP in contents = 0; RNA_utr1_deGFP is "RNA utr1--deGFP";
  species Ribo_RNA_utr1_deGFP in contents = 0; Ribo_RNA_utr1_deGFP is "Ribo:RNA utr1--deGFP";
  species DNA_plac_utr1_deGFP in contents = 20.00001/contents; DNA_plac_utr1_deGFP is "DNA plac--utr1--deGFP";
  species RNAP_DNA_plac_utr1_deGFP in contents = 0; RNAP_DNA_plac_utr1_deGFP is "RNAP:DNA plac--utr1--deGFP";
  species CUTP_AGTP_RNAP_DNA_plac_utr1_deGFP in contents = 0; CUTP_AGTP_RNAP_DNA_plac_utr1_deGFP is "CUTP:AGTP:RNAP:DNA plac--utr1--deGFP";
  species term_RNAP_DNA_plac_utr1_deGFP in contents = 0; term_RNAP_DNA_plac_utr1_deGFP is "term_RNAP:DNA plac--utr1--deGFP";
  species AA_2AGTP_Ribo_RNA_utr1_deGFP in contents = 0; AA_2AGTP_Ribo_RNA_utr1_deGFP is "AA:2AGTP:Ribo:RNA utr1--deGFP";
  species term_Ribo_RNA_utr1_deGFP in contents = 0; term_Ribo_RNA_utr1_deGFP is "term_Ribo:RNA utr1--deGFP";
  species IPTG_protein_lacItetramer in contents = 0; IPTG_protein_lacItetramer is "IPTG:protein lacItetramer";
  species AGTP_RNAP_DNA_pOR1OR2_utr1_lacI in contents = 0; AGTP_RNAP_DNA_pOR1OR2_utr1_lacI is "AGTP:RNAP:DNA pOR1OR2--utr1--lacI";
  species CUTP_RNAP_DNA_pOR1OR2_utr1_lacI in contents = 0; CUTP_RNAP_DNA_pOR1OR2_utr1_lacI is "CUTP:RNAP:DNA pOR1OR2--utr1--lacI";
  species AA_Ribo_RNA_utr1_lacI in contents = 0; AA_Ribo_RNA_utr1_lacI is "AA:Ribo:RNA utr1--lacI";
  species RNA_utr1_lacI_RNase in contents = 0; RNA_utr1_lacI_RNase is "RNA utr1--lacI:RNase";
  species Ribo_RNA_utr1_lacI_RNase in contents = 0; Ribo_RNA_utr1_lacI_RNase is "Ribo:RNA utr1--lacI:RNase";
  species AA_2AGTP_Ribo_RNA_utr1_lacI_RNase in contents = 0; AA_2AGTP_Ribo_RNA_utr1_lacI_RNase is "AA:2AGTP:Ribo:RNA utr1--lacI:RNase";
  species term_Ribo_RNA_utr1_lacI_RNase in contents = 0; term_Ribo_RNA_utr1_lacI_RNase is "term_Ribo:RNA utr1--lacI:RNase";
  species AA_Ribo_RNA_utr1_lacI_RNase in contents = 0; AA_Ribo_RNA_utr1_lacI_RNase is "AA:Ribo:RNA utr1--lacI:RNase";
  species AGTP_RNAP_DNA_plac_utr1_deGFP in contents = 0; AGTP_RNAP_DNA_plac_utr1_deGFP is "AGTP:RNAP:DNA plac--utr1--deGFP";
  species CUTP_RNAP_DNA_plac_utr1_deGFP in contents = 0; CUTP_RNAP_DNA_plac_utr1_deGFP is "CUTP:RNAP:DNA plac--utr1--deGFP";
  species DNA_plac_utr1_deGFP_protein_lacItetramer in contents = 0; DNA_plac_utr1_deGFP_protein_lacItetramer is "DNA plac--utr1--deGFP:protein lacItetramer";
  species AA_Ribo_RNA_utr1_deGFP in contents = 0; AA_Ribo_RNA_utr1_deGFP is "AA:Ribo:RNA utr1--deGFP";
  species RNA_utr1_deGFP_RNase in contents = 0; RNA_utr1_deGFP_RNase is "RNA utr1--deGFP:RNase";
  species Ribo_RNA_utr1_deGFP_RNase in contents = 0; Ribo_RNA_utr1_deGFP_RNase is "Ribo:RNA utr1--deGFP:RNase";
  species AA_2AGTP_Ribo_RNA_utr1_deGFP_RNase in contents = 0; AA_2AGTP_Ribo_RNA_utr1_deGFP_RNase is "AA:2AGTP:Ribo:RNA utr1--deGFP:RNase";
  species term_Ribo_RNA_utr1_deGFP_RNase in contents = 0; term_Ribo_RNA_utr1_deGFP_RNase is "term_Ribo:RNA utr1--deGFP:RNase";
  species AA_Ribo_RNA_utr1_deGFP_RNase in contents = 0; AA_Ribo_RNA_utr1_deGFP_RNase is "AA:Ribo:RNA utr1--deGFP:RNase";
  species AGTP_USED in contents = 0;

  // Parameters:
  AGTPdeg_F = 0;

  // Reactions:
  reaction_51: protein_lacItetramer + IPTG -> IPTG_protein_lacItetramer; mwed97bcbd_4d1b_4df8_9cc5_6efe8dc18edf*protein_lacItetramer*IPTG - mw220339f8_94a8_4c76_a9f9_58d5c54662f3*IPTG_protein_lacItetramer;
    reaction_51_k1 = 0.1; reaction_51_k2 = 0.01;
  reaction_52: 2 protein_lacI -> protein_lacIdimer; mw95143b4c_189f_4371_9e49_c9203b9cbcbc*protein_lacI^2 - mw957daec6_ebbb_49d5_8167_3766b2a188d2*protein_lacIdimer;
    reaction_52_k1 = 1.1; reaction_52_k2 = 1;
  reaction_53: 2 protein_lacIdimer -> protein_lacItetramer; TXTL_PROT_TETRAMER_proteinlacI_F*protein_lacIdimer^2 - TXTL_PROT_TETRAMER_proteinlacI_R*protein_lacItetramer;
    TXTL_PROT_TETRAMER_proteinlacI_F = 2; TXTL_PROT_TETRAMER_proteinlacI_R = 250;
  reaction_54: RNA_utr1_lacI + Ribo -> Ribo_RNA_utr1_lacI; reaction_54_TXTL_UTR_UTR1_F*RNA_utr1_lacI*Ribo - reaction_54_TXTL_UTR_UTR1_R*Ribo_RNA_utr1_lacI;
    reaction_54_TXTL_UTR_UTR1_F = 0.2; reaction_54_TXTL_UTR_UTR1_R = 4;
  reaction_55: DNA_pOR1OR2_utr1_lacI + RNAP -> RNAP_DNA_pOR1OR2_utr1_lacI; TXTL_POR1OR2_RNAPbound_F*DNA_pOR1OR2_utr1_lacI*RNAP - TXTL_POR1OR2_RNAPbound_R*RNAP_DNA_pOR1OR2_utr1_lacI;
    TXTL_POR1OR2_RNAPbound_F = 20; TXTL_POR1OR2_RNAPbound_R = 400;
  reaction_56: CUTP_AGTP_RNAP_DNA_pOR1OR2_utr1_lacI => RNAP_DNA_pOR1OR2_utr1_lacI; reaction_56_TXTL_NTP_consumption*CUTP_AGTP_RNAP_DNA_pOR1OR2_utr1_lacI;
    reaction_56_TXTL_NTP_consumption = 0.7487705;
  reaction_57: term_RNAP_DNA_pOR1OR2_utr1_lacI => RNAP + DNA_pOR1OR2_utr1_lacI; reaction_57_TXTL_RNAPBOUND_TERMINATION_RATE*term_RNAP_DNA_pOR1OR2_utr1_lacI;
    reaction_57_TXTL_RNAPBOUND_TERMINATION_RATE = 0.05;
  reaction_58: RNAP_DNA_pOR1OR2_utr1_lacI + AGTP -> AGTP_RNAP_DNA_pOR1OR2_utr1_lacI; reaction_58_TXTL_NTP_RNAP_F*RNAP_DNA_pOR1OR2_utr1_lacI*AGTP - reaction_58_TXTL_NTP_RNAP_R*AGTP_RNAP_DNA_pOR1OR2_utr1_lacI;
    reaction_58_TXTL_NTP_RNAP_F = 1000; reaction_58_TXTL_NTP_RNAP_R = 120000000;
  reaction_59: RNAP_DNA_pOR1OR2_utr1_lacI + CUTP -> CUTP_RNAP_DNA_pOR1OR2_utr1_lacI; reaction_59_TXTL_NTP_RNAP_F*RNAP_DNA_pOR1OR2_utr1_lacI*CUTP - reaction_59_TXTL_NTP_RNAP_R*CUTP_RNAP_DNA_pOR1OR2_utr1_lacI;
    reaction_59_TXTL_NTP_RNAP_F = 1000; reaction_59_TXTL_NTP_RNAP_R = 120000000;
  reaction_60: AGTP_RNAP_DNA_pOR1OR2_utr1_lacI + CUTP -> CUTP_AGTP_RNAP_DNA_pOR1OR2_utr1_lacI; reaction_60_TXTL_NTP_RNAP_F*AGTP_RNAP_DNA_pOR1OR2_utr1_lacI*CUTP - reaction_60_TXTL_NTP_RNAP_R*CUTP_AGTP_RNAP_DNA_pOR1OR2_utr1_lacI;
    reaction_60_TXTL_NTP_RNAP_F = 1; reaction_60_TXTL_NTP_RNAP_R = 120000;
  reaction_61: CUTP_RNAP_DNA_pOR1OR2_utr1_lacI + AGTP -> CUTP_AGTP_RNAP_DNA_pOR1OR2_utr1_lacI; reaction_61_TXTL_NTP_RNAP_F*CUTP_RNAP_DNA_pOR1OR2_utr1_lacI*AGTP - reaction_61_TXTL_NTP_RNAP_R*CUTP_AGTP_RNAP_DNA_pOR1OR2_utr1_lacI;
    reaction_61_TXTL_NTP_RNAP_F = 1; reaction_61_TXTL_NTP_RNAP_R = 120000;
  reaction_62: CUTP_AGTP_RNAP_DNA_pOR1OR2_utr1_lacI => term_RNAP_DNA_pOR1OR2_utr1_lacI + RNA_utr1_lacI; reaction_62_TXTL_transcription_rate1*CUTP_AGTP_RNAP_DNA_pOR1OR2_utr1_lacI;
    reaction_62_TXTL_transcription_rate1 = 0.001229508;
  reaction_63: Ribo_RNA_utr1_lacI + AA -> AA_Ribo_RNA_utr1_lacI; reaction_63_TL_AA_F*Ribo_RNA_utr1_lacI*AA - reaction_63_TL_AA_R*AA_Ribo_RNA_utr1_lacI;
    reaction_63_TL_AA_F = 300; reaction_63_TL_AA_R = 0.1;
  reaction_64: AA_Ribo_RNA_utr1_lacI + 2 AGTP -> AA_2AGTP_Ribo_RNA_utr1_lacI; reaction_64_TL_AGTP_F*AA_Ribo_RNA_utr1_lacI*AGTP^2 - reaction_64_TL_AGTP_R*AA_2AGTP_Ribo_RNA_utr1_lacI;
    reaction_64_TL_AGTP_F = 30; reaction_64_TL_AGTP_R = 10;
  reaction_65: AA_2AGTP_Ribo_RNA_utr1_lacI => term_Ribo_RNA_utr1_lacI; reaction_65_TXTL_TL_AA_consumption*AA_2AGTP_Ribo_RNA_utr1_lacI;
    reaction_65_TXTL_TL_AA_consumption = 0.03;
  reaction_66: AA_2AGTP_Ribo_RNA_utr1_lacI => term_Ribo_RNA_utr1_lacI + protein_lacI; reaction_66_TXTL_TL_rate*AA_2AGTP_Ribo_RNA_utr1_lacI;
    reaction_66_TXTL_TL_rate = 0.01;
  reaction_67: term_Ribo_RNA_utr1_lacI => RNA_utr1_lacI + Ribo; reaction_67_TXTL_RIBOBOUND_TERMINATION_RATE*term_Ribo_RNA_utr1_lacI;
    reaction_67_TXTL_RIBOBOUND_TERMINATION_RATE = 50;
  reaction_68: RNA_utr1_lacI + RNase -> RNA_utr1_lacI_RNase; reaction_68_TXTL_RNAdeg_F*RNA_utr1_lacI*RNase - reaction_68_TXTL_RNAdeg_R*RNA_utr1_lacI_RNase;
    reaction_68_TXTL_RNAdeg_F = 10; reaction_68_TXTL_RNAdeg_R = 2000;
  reaction_69: RNA_utr1_lacI_RNase => RNase; reaction_69_TXTL_RNAdeg_F*RNA_utr1_lacI_RNase;
    reaction_69_TXTL_RNAdeg_F = 0.002777778;
  reaction_70: Ribo_RNA_utr1_lacI + RNase -> Ribo_RNA_utr1_lacI_RNase; reaction_70_TXTL_RNAdeg_F*Ribo_RNA_utr1_lacI*RNase - reaction_70_TXTL_RNAdeg_R*Ribo_RNA_utr1_lacI_RNase;
    reaction_70_TXTL_RNAdeg_F = 10; reaction_70_TXTL_RNAdeg_R = 2000;
  reaction_71: Ribo_RNA_utr1_lacI_RNase => RNase + Ribo; reaction_71_TXTL_RNAdeg_F*Ribo_RNA_utr1_lacI_RNase;
    reaction_71_TXTL_RNAdeg_F = 0.002777778;
  reaction_72: AA_2AGTP_Ribo_RNA_utr1_lacI + RNase -> AA_2AGTP_Ribo_RNA_utr1_lacI_RNase; reaction_72_TXTL_RNAdeg_F*AA_2AGTP_Ribo_RNA_utr1_lacI*RNase - reaction_72_TXTL_RNAdeg_R*AA_2AGTP_Ribo_RNA_utr1_lacI_RNase;
    reaction_72_TXTL_RNAdeg_F = 10; reaction_72_TXTL_RNAdeg_R = 2000;
  reaction_73: AA_2AGTP_Ribo_RNA_utr1_lacI_RNase => RNase + AA + 2 AGTP + Ribo; reaction_73_TXTL_RNAdeg_F*AA_2AGTP_Ribo_RNA_utr1_lacI_RNase;
    reaction_73_TXTL_RNAdeg_F = 0.002777778;
  reaction_74: term_Ribo_RNA_utr1_lacI + RNase -> term_Ribo_RNA_utr1_lacI_RNase; reaction_74_TXTL_RNAdeg_F*term_Ribo_RNA_utr1_lacI*RNase - reaction_74_TXTL_RNAdeg_R*term_Ribo_RNA_utr1_lacI_RNase;
    reaction_74_TXTL_RNAdeg_F = 10; reaction_74_TXTL_RNAdeg_R = 2000;
  reaction_75: term_Ribo_RNA_utr1_lacI_RNase => RNase + Ribo; reaction_75_TXTL_RNAdeg_F*term_Ribo_RNA_utr1_lacI_RNase;
    reaction_75_TXTL_RNAdeg_F = 0.002777778;
  reaction_76: AA_Ribo_RNA_utr1_lacI + RNase -> AA_Ribo_RNA_utr1_lacI_RNase; reaction_76_TXTL_RNAdeg_F*AA_Ribo_RNA_utr1_lacI*RNase - reaction_76_TXTL_RNAdeg_R*AA_Ribo_RNA_utr1_lacI_RNase;
    reaction_76_TXTL_RNAdeg_F = 10; reaction_76_TXTL_RNAdeg_R = 2000;
  reaction_77: AA_Ribo_RNA_utr1_lacI_RNase => RNase + AA + Ribo; reaction_77_TXTL_RNAdeg_F*AA_Ribo_RNA_utr1_lacI_RNase;
    reaction_77_TXTL_RNAdeg_F = 0.002777778;
  reaction_78: protein_deGFP_contents_21 => protein_deGFP_contents_22; TXTL_PROT_deGFP_MATURATION*protein_deGFP_contents_21;
    TXTL_PROT_deGFP_MATURATION = 0.002310491;
  reaction_79: RNA_utr1_deGFP + Ribo -> Ribo_RNA_utr1_deGFP; reaction_79_TXTL_UTR_UTR1_F*RNA_utr1_deGFP*Ribo - reaction_79_TXTL_UTR_UTR1_R*Ribo_RNA_utr1_deGFP;
    reaction_79_TXTL_UTR_UTR1_F = 0.2; reaction_79_TXTL_UTR_UTR1_R = 4;
  reaction_80: DNA_plac_utr1_deGFP + RNAP -> RNAP_DNA_plac_utr1_deGFP; TXTL_PLAC_RNAPbound_F*DNA_plac_utr1_deGFP*RNAP - TXTL_PLAC_RNAPbound_R*RNAP_DNA_plac_utr1_deGFP;
    TXTL_PLAC_RNAPbound_F = 20; TXTL_PLAC_RNAPbound_R = 400;
  reaction_81: CUTP_AGTP_RNAP_DNA_plac_utr1_deGFP => RNAP_DNA_plac_utr1_deGFP; reaction_81_TXTL_NTP_consumption*CUTP_AGTP_RNAP_DNA_plac_utr1_deGFP;
    reaction_81_TXTL_NTP_consumption = 0.7485294;
  reaction_82: term_RNAP_DNA_plac_utr1_deGFP => RNAP + DNA_plac_utr1_deGFP; reaction_82_TXTL_RNAPBOUND_TERMINATION_RATE*term_RNAP_DNA_plac_utr1_deGFP;
    reaction_82_TXTL_RNAPBOUND_TERMINATION_RATE = 0.05;
  reaction_83: RNAP_DNA_plac_utr1_deGFP + AGTP -> AGTP_RNAP_DNA_plac_utr1_deGFP; reaction_83_TXTL_NTP_RNAP_F*RNAP_DNA_plac_utr1_deGFP*AGTP - reaction_83_TXTL_NTP_RNAP_R*AGTP_RNAP_DNA_plac_utr1_deGFP;
    reaction_83_TXTL_NTP_RNAP_F = 1000; reaction_83_TXTL_NTP_RNAP_R = 120000000;
  reaction_84: RNAP_DNA_plac_utr1_deGFP + CUTP -> CUTP_RNAP_DNA_plac_utr1_deGFP; reaction_84_TXTL_NTP_RNAP_F*RNAP_DNA_plac_utr1_deGFP*CUTP - reaction_84_TXTL_NTP_RNAP_R*CUTP_RNAP_DNA_plac_utr1_deGFP;
    reaction_84_TXTL_NTP_RNAP_F = 1000; reaction_84_TXTL_NTP_RNAP_R = 120000000;
  reaction_85: AGTP_RNAP_DNA_plac_utr1_deGFP + CUTP -> CUTP_AGTP_RNAP_DNA_plac_utr1_deGFP; reaction_85_TXTL_NTP_RNAP_F*AGTP_RNAP_DNA_plac_utr1_deGFP*CUTP - reaction_85_TXTL_NTP_RNAP_R*CUTP_AGTP_RNAP_DNA_plac_utr1_deGFP;
    reaction_85_TXTL_NTP_RNAP_F = 1; reaction_85_TXTL_NTP_RNAP_R = 120000;
  reaction_86: CUTP_RNAP_DNA_plac_utr1_deGFP + AGTP -> CUTP_AGTP_RNAP_DNA_plac_utr1_deGFP; reaction_86_TXTL_NTP_RNAP_F*CUTP_RNAP_DNA_plac_utr1_deGFP*AGTP - reaction_86_TXTL_NTP_RNAP_R*CUTP_AGTP_RNAP_DNA_plac_utr1_deGFP;
    reaction_86_TXTL_NTP_RNAP_F = 1; reaction_86_TXTL_NTP_RNAP_R = 120000;
  reaction_87: CUTP_AGTP_RNAP_DNA_plac_utr1_deGFP => term_RNAP_DNA_plac_utr1_deGFP + RNA_utr1_deGFP; reaction_87_TXTL_transcription_rate1*CUTP_AGTP_RNAP_DNA_plac_utr1_deGFP;
    reaction_87_TXTL_transcription_rate1 = 0.001470588;
  reaction_88: DNA_plac_utr1_deGFP + protein_lacItetramer -> DNA_plac_utr1_deGFP_protein_lacItetramer; placI_sequestration_F*DNA_plac_utr1_deGFP*protein_lacItetramer - placI_sequestration_R*DNA_plac_utr1_deGFP_protein_lacItetramer;
    placI_sequestration_F = 150; placI_sequestration_R = 0.1;
  reaction_89: Ribo_RNA_utr1_deGFP + AA -> AA_Ribo_RNA_utr1_deGFP; reaction_89_TL_AA_F*Ribo_RNA_utr1_deGFP*AA - reaction_89_TL_AA_R*AA_Ribo_RNA_utr1_deGFP;
    reaction_89_TL_AA_F = 300; reaction_89_TL_AA_R = 0.1;
  reaction_90: AA_Ribo_RNA_utr1_deGFP + 2 AGTP -> AA_2AGTP_Ribo_RNA_utr1_deGFP; reaction_90_TL_AGTP_F*AA_Ribo_RNA_utr1_deGFP*AGTP^2 - reaction_90_TL_AGTP_R*AA_2AGTP_Ribo_RNA_utr1_deGFP;
    reaction_90_TL_AGTP_F = 30; reaction_90_TL_AGTP_R = 10;
  reaction_91: AA_2AGTP_Ribo_RNA_utr1_deGFP => term_Ribo_RNA_utr1_deGFP; reaction_91_TXTL_TL_AA_consumption*AA_2AGTP_Ribo_RNA_utr1_deGFP;
    reaction_91_TXTL_TL_AA_consumption = 0.024;
  reaction_92: AA_2AGTP_Ribo_RNA_utr1_deGFP => term_Ribo_RNA_utr1_deGFP + protein_deGFP_contents_21; reaction_92_TXTL_TL_rate*AA_2AGTP_Ribo_RNA_utr1_deGFP;
    reaction_92_TXTL_TL_rate = 0.012;
  reaction_93: term_Ribo_RNA_utr1_deGFP => RNA_utr1_deGFP + Ribo; reaction_93_TXTL_RIBOBOUND_TERMINATION_RATE*term_Ribo_RNA_utr1_deGFP;
    reaction_93_TXTL_RIBOBOUND_TERMINATION_RATE = 50;
  reaction_94: RNA_utr1_deGFP + RNase -> RNA_utr1_deGFP_RNase; reaction_94_TXTL_RNAdeg_F*RNA_utr1_deGFP*RNase - reaction_94_TXTL_RNAdeg_R*RNA_utr1_deGFP_RNase;
    reaction_94_TXTL_RNAdeg_F = 10; reaction_94_TXTL_RNAdeg_R = 2000;
  reaction_95: RNA_utr1_deGFP_RNase => RNase; reaction_95_TXTL_RNAdeg_F*RNA_utr1_deGFP_RNase;
    reaction_95_TXTL_RNAdeg_F = 0.002777778;
  reaction_96: Ribo_RNA_utr1_deGFP + RNase -> Ribo_RNA_utr1_deGFP_RNase; reaction_96_TXTL_RNAdeg_F*Ribo_RNA_utr1_deGFP*RNase - reaction_96_TXTL_RNAdeg_R*Ribo_RNA_utr1_deGFP_RNase;
    reaction_96_TXTL_RNAdeg_F = 10; reaction_96_TXTL_RNAdeg_R = 2000;
  reaction_97: Ribo_RNA_utr1_deGFP_RNase => RNase + Ribo; reaction_97_TXTL_RNAdeg_F*Ribo_RNA_utr1_deGFP_RNase;
    reaction_97_TXTL_RNAdeg_F = 0.002777778;
  reaction_98: AA_2AGTP_Ribo_RNA_utr1_deGFP + RNase -> AA_2AGTP_Ribo_RNA_utr1_deGFP_RNase; reaction_98_TXTL_RNAdeg_F*AA_2AGTP_Ribo_RNA_utr1_deGFP*RNase - reaction_98_TXTL_RNAdeg_R*AA_2AGTP_Ribo_RNA_utr1_deGFP_RNase;
    reaction_98_TXTL_RNAdeg_F = 10; reaction_98_TXTL_RNAdeg_R = 2000;
  reaction_99: AA_2AGTP_Ribo_RNA_utr1_deGFP_RNase => RNase + AA + 2 AGTP + Ribo; reaction_99_TXTL_RNAdeg_F*AA_2AGTP_Ribo_RNA_utr1_deGFP_RNase;
    reaction_99_TXTL_RNAdeg_F = 0.002777778;
  reaction_100: term_Ribo_RNA_utr1_deGFP + RNase -> term_Ribo_RNA_utr1_deGFP_RNase; reaction_100_TXTL_RNAdeg_F*term_Ribo_RNA_utr1_deGFP*RNase - reaction_100_TXTL_RNAdeg_R*term_Ribo_RNA_utr1_deGFP_RNase;
    reaction_100_TXTL_RNAdeg_F = 10; reaction_100_TXTL_RNAdeg_R = 2000;
  reaction_101: term_Ribo_RNA_utr1_deGFP_RNase => RNase + Ribo; reaction_101_TXTL_RNAdeg_F*term_Ribo_RNA_utr1_deGFP_RNase;
    reaction_101_TXTL_RNAdeg_F = 0.002777778;
  reaction_102: AA_Ribo_RNA_utr1_deGFP + RNase -> AA_Ribo_RNA_utr1_deGFP_RNase; reaction_102_TXTL_RNAdeg_F*AA_Ribo_RNA_utr1_deGFP*RNase - reaction_102_TXTL_RNAdeg_R*AA_Ribo_RNA_utr1_deGFP_RNase;
    reaction_102_TXTL_RNAdeg_F = 10; reaction_102_TXTL_RNAdeg_R = 2000;
  reaction_103: AA_Ribo_RNA_utr1_deGFP_RNase => RNase + AA + Ribo; reaction_103_TXTL_RNAdeg_F*AA_Ribo_RNA_utr1_deGFP_RNase;
    reaction_103_TXTL_RNAdeg_F = 0.002777778;
  reaction_104: AGTP => AGTP_USED; AGTPdeg_F*AGTP;

  // Events:
  event_105: at (time <= 5400): AGTPdeg_F = 0;
  event_106: at (time > 5400): AGTPdeg_F = 0.0002;
end
