// SBML level 3 version 1

model main()
  // model units - substance: mole, time: second, volume: litre, area: square_metre, length: metre, extent: mole

  // Compartments:
  compartment default = 1e-6;

  // Species:
  species protein_RNAP in default = 0;
  species protein_Ribo in default = 0;
  species protein_RNAase in default = 0;
  species protein_Reporter in default = 0;
  species complex_dna_G1_protein_RNAP in default = 0;
  species rna_T1 in default = 0;
  species complex_protein_RNAase_rna_T1 in default = 0;
  species complex_protein_Ribo_rna_T1 in default = 0;
  species protein_T1 in default = 0;
  species dna_G1 in default = 0;

  // Reactions:
  r0: dna_G1 + protein_RNAP => complex_dna_G1_protein_RNAP; r0_k*dna_G1*protein_RNAP;
    r0_k = 100;
  r0_1: complex_dna_G1_protein_RNAP => dna_G1 + protein_RNAP; r0_1_k*complex_dna_G1_protein_RNAP;
    r0_1_k = 10;
  r2: complex_dna_G1_protein_RNAP => dna_G1 + rna_T1 + protein_RNAP; r2_k*complex_dna_G1_protein_RNAP;
    r2_k = 3;
  r3: rna_T1 + protein_Ribo => complex_protein_Ribo_rna_T1; r3_k*rna_T1*protein_Ribo;
    r3_k = 100;
  r3_1: complex_protein_Ribo_rna_T1 => rna_T1 + protein_Ribo; r3_1_k*complex_protein_Ribo_rna_T1;
    r3_1_k = 10;
  r5: complex_protein_Ribo_rna_T1 => rna_T1 + protein_Reporter + protein_Ribo; r5_k*complex_protein_Ribo_rna_T1;
    r5_k = 2;
  r6: rna_T1 + protein_RNAase => complex_protein_RNAase_rna_T1; r6_k*rna_T1*protein_RNAase;
    r6_k = 100;
  r6_1: complex_protein_RNAase_rna_T1 => rna_T1 + protein_RNAase; r6_1_k*complex_protein_RNAase_rna_T1;
    r6_1_k = 10;
  r8: complex_protein_RNAase_rna_T1 => protein_RNAase; r8_k*complex_protein_RNAase_rna_T1;
    r8_k = 1;

  // Unit definitions:
  unit square_metre = metre^2;
end
