// SBML level 3 version 2

model main()
  // model units - substance: mole, time: second, volume: litre, area: square_metre, length: metre, extent: mole

  // Compartments:
  compartment default = 1.1e-6;

  // Species:
  species complex_dna_G1_protein_RNAP in default = 0;
  species complex_protein_RNAase_rna_G1 in default = 0;
  species complex_protein_Ribo_rna_G1 in default = 0;
  species dna_G1 in default = 0;
  species protein_GFP in default = 0;
  species protein_RNAP in default = 0;
  species protein_RNAase in default = 0;
  species protein_Ribo in default = 0;
  species rna_G1 in default = 0;

  // Reactions:
  r0: complex_dna_G1_protein_RNAP => dna_G1 + rna_G1 + protein_RNAP; r0_k*complex_dna_G1_protein_RNAP;
    r0_k = 3;
  r1: complex_protein_RNAase_rna_G1 => protein_RNAase; r1_k*complex_protein_RNAase_rna_G1;
    r1_k = 1;
  r2: complex_protein_Ribo_rna_G1 => rna_G1 + protein_GFP + protein_Ribo; r2_k*complex_protein_Ribo_rna_G1;
    r2_k = 2;
  r3: dna_G1 + protein_RNAP => complex_dna_G1_protein_RNAP; r3_k*dna_G1*protein_RNAP;
    r3_k = 100;
  r3_1: complex_dna_G1_protein_RNAP => dna_G1 + protein_RNAP; r3_1_k*complex_dna_G1_protein_RNAP;
    r3_1_k = 10;
  r5: rna_G1 + protein_RNAase => complex_protein_RNAase_rna_G1; r5_k*rna_G1*protein_RNAase;
    r5_k = 10;
  r5_1: complex_protein_RNAase_rna_G1 => rna_G1 + protein_RNAase; r5_1_k*complex_protein_RNAase_rna_G1;
    r5_1_k = 0.5;
  r7: rna_G1 + protein_Ribo => complex_protein_Ribo_rna_G1; r7_k*rna_G1*protein_Ribo;
    r7_k = 10;
  r7_1: complex_protein_Ribo_rna_G1 => rna_G1 + protein_Ribo; r7_1_k*complex_protein_Ribo_rna_G1;
    r7_1_k = 0.25;

  // Unit definitions:
  unit square_metre = metre^2;
end
