// SBML level 3 version 1

model main()
  // model units - substance: mole, time: second, volume: litre, area: square_metre, length: metre, extent: mole

  // Compartments:
  compartment default = 1e-6;

  // Species:
  species protein_RNAP in default = 0;
  species protein_Ribo in default = 0;
  species protein_RNAase in default = 0;
  species protein_Reporter in default = 0;
  species dna_G1 in default = 0;
  species complex_rna_T1_protein_RNAase in default = 0;
  species complex_dna_G1_protein_RNAP in default = 0;
  species complex_rna_T1_protein_Ribo in default = 0;
  species rna_T1 in default = 0;

  // Reactions:
  r0: dna_G1 + protein_RNAP => complex_dna_G1_protein_RNAP; r0_k*dna_G1*protein_RNAP;
    r0_k = 100;
  r0_1: complex_dna_G1_protein_RNAP => dna_G1 + protein_RNAP; r0_1_k*complex_dna_G1_protein_RNAP;
    r0_1_k = 10;
  r2: complex_dna_G1_protein_RNAP => dna_G1 + rna_T1 + protein_RNAP; r2_k*complex_dna_G1_protein_RNAP;
    r2_k = 3;
  r4: protein_Ribo + rna_T1 => complex_rna_T1_protein_Ribo; r4_k*protein_Ribo*rna_T1;
    r4_k = 100;
  r4_1: complex_rna_T1_protein_Ribo => protein_Ribo + rna_T1; r4_1_k*complex_rna_T1_protein_Ribo;
    r4_1_k = 10;
  r6: complex_rna_T1_protein_Ribo => protein_Reporter + protein_Ribo + rna_T1; r6_k*complex_rna_T1_protein_Ribo;
    r6_k = 2;
  r8: rna_T1 + protein_RNAase => complex_rna_T1_protein_RNAase; r8_k*rna_T1*protein_RNAase;
    r8_k = 100;
  r8_1: complex_rna_T1_protein_RNAase => rna_T1 + protein_RNAase; r8_1_k*complex_rna_T1_protein_RNAase;
    r8_1_k = 10;
  r10: complex_rna_T1_protein_RNAase => protein_RNAase; r10_k*complex_rna_T1_protein_RNAase;
    r10_k = 1;

  // Unit definitions:
  unit square_metre = metre^2;
end
