// SBML level 3 version 1

model main()
  // model units - substance: mole, time: second, volume: litre, area: square_metre, length: metre, extent: mole

  // Compartments:
  compartment default = 1.1e-6;

  // Species:
  species protein_RNAP in default = 0;
  species protein_Ribo in default = 0;
  species protein_RNAase in default = 0;
  species complex_rna_G1_protein_RNAase in default = 0;
  species complex_dna_G1_protein_RNAP in default = 0;
  species protein_GFP in default = 0;
  species complex_rna_G1_protein_Ribo in default = 0;
  species dna_G1 in default = 0;
  species rna_G1 in default = 0;
  species complex_rna_G2_protein_Ribo in default = 0;
  species rna_G2 in default = 0;
  species protein_tetR in default = 0;
  species dna_G2 in default = 1e-6;
  species complex_dna_G2_protein_RNAP in default = 0;
  species complex_rna_G2_protein_RNAase in default = 0;

  // Reactions:
  r0: protein_RNAP + dna_G1 => complex_dna_G1_protein_RNAP; r0_k*protein_RNAP*dna_G1;
    r0_k = 100;
  r0_1: complex_dna_G1_protein_RNAP => protein_RNAP + dna_G1; r0_1_k*complex_dna_G1_protein_RNAP;
    r0_1_k = 10;
  r2: complex_dna_G1_protein_RNAP => protein_RNAP + dna_G1 + rna_G1; r2_k*complex_dna_G1_protein_RNAP;
    r2_k = 3;
  r4: protein_Ribo + rna_G1 => complex_rna_G1_protein_Ribo; r4_k*protein_Ribo*rna_G1;
    r4_k = 100;
  r4_1: complex_rna_G1_protein_Ribo => protein_Ribo + rna_G1; r4_1_k*complex_rna_G1_protein_Ribo;
    r4_1_k = 10;
  r6: complex_rna_G1_protein_Ribo => protein_Ribo + rna_G1 + protein_GFP; r6_k*complex_rna_G1_protein_Ribo;
    r6_k = 2;
  r8: protein_RNAase + rna_G1 => complex_rna_G1_protein_RNAase; r8_k*protein_RNAase*rna_G1;
    r8_k = 100;
  r8_1: complex_rna_G1_protein_RNAase => protein_RNAase + rna_G1; r8_1_k*complex_rna_G1_protein_RNAase;
    r8_1_k = 10;
  r10: complex_rna_G1_protein_RNAase => protein_RNAase; r10_k*complex_rna_G1_protein_RNAase;
    r10_k = 1;
  r12: dna_G2 + protein_RNAP => complex_dna_G2_protein_RNAP; r12_k*dna_G2*protein_RNAP;
    r12_k = 100;
  r12_1: complex_dna_G2_protein_RNAP => dna_G2 + protein_RNAP; r12_1_k*complex_dna_G2_protein_RNAP;
    r12_1_k = 10;
  r14: complex_dna_G2_protein_RNAP => dna_G2 + protein_RNAP + rna_G2; r14_k*complex_dna_G2_protein_RNAP;
    r14_k = 3;
  r16: rna_G2 + protein_Ribo => complex_rna_G2_protein_Ribo; r16_k*rna_G2*protein_Ribo;
    r16_k = 100;
  r16_1: complex_rna_G2_protein_Ribo => rna_G2 + protein_Ribo; r16_1_k*complex_rna_G2_protein_Ribo;
    r16_1_k = 10;
  r18: complex_rna_G2_protein_Ribo => rna_G2 + protein_Ribo + protein_tetR; r18_k*complex_rna_G2_protein_Ribo;
    r18_k = 2;
  r20: protein_RNAase + rna_G2 => complex_rna_G2_protein_RNAase; r20_k*protein_RNAase*rna_G2;
    r20_k = 100;
  r20_1: complex_rna_G2_protein_RNAase => protein_RNAase + rna_G2; r20_1_k*complex_rna_G2_protein_RNAase;
    r20_1_k = 10;
  r22: complex_rna_G2_protein_RNAase => protein_RNAase; r22_k*complex_rna_G2_protein_RNAase;
    r22_k = 1;

  // Unit definitions:
  unit square_metre = metre^2;
end
