// SBML level 3 version 1

model main()
  // model units - substance: mole, time: second, volume: litre, area: square_metre, length: metre, extent: mole

  // Compartments:
  compartment default = 1e-6;

  // Species:
  species DNA_G in default = 0;
  species protein_R in default = 0;
  species dimer_R in default = 0;
  species protein_R_deg in default = 0;

  // Reactions:
  r0: DNA_G => protein_R + DNA_G; r0_k*DNA_G;
    r0_k = 1;
  r2: protein_R => dimer_R; r2_k*protein_R^2;
    r2_k = 100;
  r2_1: 2 dimer_R => protein_R; r2_1_k*dimer_R;
    r2_1_k = 10;
  r4: 2 dimer_R => protein_R_deg; r4_k*dimer_R;
    r4_k = 100;
  r4_1: protein_R_deg => dimer_R; r4_1_k*protein_R_deg^2;
    r4_1_k = 10;
  r6: protein_R_deg => ; r6_k*protein_R_deg;
    r6_k = 0.1;

  // Unit definitions:
  unit square_metre = metre^2;
end
